<?xml version="1.0"?>
<?xml-stylesheet type="text/xsl" href="http://jsbsim.sourceforge.net/JSBSim.xsl"?>
<fdm_config name="swift_r5" version="2.0" release="ALPHA"
   xmlns:xsi="http://www.w3.org/2001/XMLSchema-instance"
   xsi:noNamespaceSchemaLocation="http://jsbsim.sourceforge.net/JSBSim.xsd">

 <fileheader>
  <author> Aeromatic v 0.95 </author>
  <filecreationdate> 2011-08-22 </filecreationdate>
  <version>$Revision: 1.10 $</version>
  <description> Models a supermarine swift_r5. </description>
 </fileheader>

<!--
  File:     swift_r5.xml
  Inputs:
    name:          Swift R5
    type:          single-engine transonic fighter
    max weight:    21400.0 lb
    wing span:     32.33 ft
    length:        42.25 ft
    wing area:     327.7 sq-ft
    gear type:     tricycle
    retractable?:  yes
    # engines:     1
    engine type:   turbine
    engine layout: aft fuselage
    yaw damper?    yes
  Outputs:
    wing loading:  89.77 lb/sq-ft
    CL-alpha:      3.5 per radian
    CL-0:          0.08
    CL-max:        1
    CD-0:          0.021
    K:             0.12

-->

 <metrics>
   <wingarea  unit="FT2">  327.70 </wingarea>
   <wingspan  unit="FT" >   32.33 </wingspan>
   <wing_incidence>          1.75 </wing_incidence>
   <chord     unit="FT" >    10.12 </chord>
   <htailarea unit="FT2">   42.00 </htailarea>
   <htailarm  unit="FT" >   17.191 </htailarm>
   <vtailarea unit="FT2">   29.14 </vtailarea>
   <vtailarm  unit="FT" >   15.485 </vtailarm>
   <location name="AERORP" unit="M">
     <x>  -0.102 </x>
     <y>   0.00 </y>
     <z>   -0.308 </z>
   </location>
   <location name="EYEPOINT" unit="M">
     <x>  0.0 </x>
     <y>  0.00 </y>
     <z>  0.00 </z>
   </location>
   <location name="VRP" unit="M">
     <x>0</x>
     <y>0</y>
     <z>0</z>
   </location>
 </metrics>

 <mass_balance>
   <ixx unit="SLUG*FT2">     9585 </ixx>
   <iyy unit="SLUG*FT2">     16334 </iyy>
   <izz unit="SLUG*FT2">     13203 </izz>
   <emptywt unit="LBS" >     13435 </emptywt>
   <location name="CG" unit="M">
     <x>    0.074 </x>
     <y>   0.00 </y>
     <z>  -0.018 </z>
   </location>
 </mass_balance>

 <ground_reactions>

  <contact type="BOGEY" name="NOSE">
   <location unit="M">
     <x>  -3.9525 </x>
     <y>   0.00 </y>
     <z> -1.71 </z>
   </location>
   <static_friction>  0.80 </static_friction>
   <dynamic_friction> 0.50 </dynamic_friction>
   <rolling_friction> 0.02 </rolling_friction>
   <spring_coeff unit="LBS/FT">       9202.00 </spring_coeff>
   <damping_coeff unit="LBS/FT/SEC">  2880.00 </damping_coeff>
   <max_steer unit="DEG"> 30.00 </max_steer>
   <brake_group>NONE</brake_group>
   <retractable>1</retractable>
 </contact>

  <contact type="BOGEY" name="LEFT_MAIN">
   <location unit="M">
     <x> 0.347 </x>
     <y> -2.292 </y>
     <z> -1.817 </z>
   </location>
   <static_friction>  0.80 </static_friction>
   <dynamic_friction> 0.50 </dynamic_friction>
   <rolling_friction> 0.02 </rolling_friction>
   <spring_coeff unit="LBS/FT">      21000.00 </spring_coeff>
   <damping_coeff unit="LBS/FT/SEC"> 9000.00 </damping_coeff>
   <max_steer unit="DEG">0</max_steer>
   <brake_group>LEFT</brake_group>
   <retractable>1</retractable>
 </contact>

  <contact type="BOGEY" name="RIGHT_MAIN">
   <location unit="M">
     <x> 0.347 </x>
     <y>  2.292 </y>
     <z> -1.817 </z>
   </location>
   <static_friction>  0.80 </static_friction>
   <dynamic_friction> 0.50 </dynamic_friction>
   <rolling_friction> 0.02 </rolling_friction>
   <spring_coeff unit="LBS/FT">      21000.00 </spring_coeff>
   <damping_coeff unit="LBS/FT/SEC"> 9000.00 </damping_coeff>
   <max_steer unit="DEG">0</max_steer>
   <brake_group>RIGHT</brake_group>
   <retractable>1</retractable>
 </contact>

  <contact type="STRUCTURE" name="LEFT_WING">
    <location unit="M">
     <x>  2.87 </x>
     <y> -4.985 </y>
     <z> -0.346 </z>
    </location>
    <static_friction>  0.80 </static_friction>
    <dynamic_friction> 0.50 </dynamic_friction>
    <spring_coeff unit="LBS/FT">      23340.00 </spring_coeff>
    <damping_coeff unit="LBS/FT/SEC">  4668.00 </damping_coeff>
 </contact>

  <contact type="STRUCTURE" name="RIGHT_WING">
    <location unit="M">
     <x>  2.87 </x>
     <y>  4.985 </y>
     <z> -0.346 </z>
    </location>
    <static_friction>  0.80 </static_friction>
    <dynamic_friction> 0.50 </dynamic_friction>
    <spring_coeff unit="LBS/FT">      23340.00 </spring_coeff>
    <damping_coeff unit="LBS/FT/SEC">  4668.00 </damping_coeff>
 </contact>

<contact type="STRUCTURE" name="RUDDER_TOP">
    <location unit="M">
     <x>  5.367 </x>
     <y>  0.00 </y>
     <z>  2.376 </z>
    </location>
    <static_friction>  0.80 </static_friction>
    <dynamic_friction> 0.50 </dynamic_friction>
    <spring_coeff unit="LBS/FT">      23340.00 </spring_coeff>
    <damping_coeff unit="LBS/FT/SEC">  4668.00 </damping_coeff>
 </contact>

<contact type="STRUCTURE" name="NOSE">
    <location unit="M">
     <x>  -6.27 </x>
     <y>  0.00 </y>
     <z> -0.08 </z>
    </location>
    <static_friction>  0.80 </static_friction>
    <dynamic_friction> 0.50 </dynamic_friction>
    <spring_coeff unit="LBS/FT">      23340.00 </spring_coeff>
    <damping_coeff unit="LBS/FT/SEC">  4668.00 </damping_coeff>
 </contact>

<contact type="STRUCTURE" name="TAIL_NOZZLE">
    <location unit="M">
     <x>  6.097 </x>
     <y>  0.00 </y>
     <z> -0.418 </z>
    </location>
    <static_friction>  0.80 </static_friction>
    <dynamic_friction> 0.50 </dynamic_friction>
    <spring_coeff unit="LBS/FT">      23340.00 </spring_coeff>
    <damping_coeff unit="LBS/FT/SEC">  4668.00 </damping_coeff>
 </contact>

 </ground_reactions>

 <propulsion>

   <engine file="Avon-114">
    <location unit="M">
      <x> 0.532 </x>
      <y>   0.00 </y>
      <z>   0.00 </z>
    </location>
    <feed>0</feed>
    <feed>1</feed>
    <feed>2</feed>
    <feed>3</feed>
    <feed>4</feed>
    <thruster file="direct">
     <location unit="M">
       <x>   5.833 </x>
       <y>   0.00 </y>
       <z>   -0.007 </z>
     </location>
     <orient unit="DEG">
       <pitch> 1.00 </pitch>
       <roll>  0.00 </roll>
       <yaw>   0.00 </yaw>
     </orient>
    </thruster>
  </engine>

  <tank type="FUEL" number="0"><!-- fuselage -->
     <location unit="M">
       <x> -0.32 </x>
       <y>   0.00 </y>
       <z> -11.43 </z>
     </location>
     <type>JP-3</type>
     <capacity unit="LBS"> 964.00 </capacity>
     <contents unit="LBS"> 950.00 </contents>
  </tank>

  <tank type="FUEL" number="1"><!-- left wing -->
     <location unit="M">
       <x> 0.032 </x>
       <y> -0.94 </y>
       <z> -0.343 </z>
     </location>
     <type>JP-3</type>
     <capacity unit="LBS"> 950.00 </capacity>
     <contents unit="LBS"> 930.00 </contents>
  </tank>

  <tank type="FUEL" number="2"><!-- right wing -->
     <location unit="M">
       <x> 0.032 </x>
       <y>  0.94 </y>
       <z> -0.343 </z>
     </location>
     <type>JP-3</type>
     <capacity unit="LBS"> 950.00 </capacity>
     <contents unit="LBS"> 930.00 </contents>
  </tank>

  <tank type="FUEL" number="3"><!-- left wing tip -->
     <location unit="M">
       <x> 0.362 </x>
       <y> -2.00 </y>
       <z> -0.343 </z>
     </location>
     <type>JP-3</type>
     <capacity unit="LBS"> 258.00 </capacity>
     <contents unit="LBS"> 100.00 </contents>
  </tank>

  <tank type="FUEL" number="4"><!-- right wing tip-->
     <location unit="M">
       <x> 0.362 </x>
       <y> 2.00 </y>
       <z> -0.343 </z>
     </location>
     <type>JP-3</type>
     <capacity unit="LBS"> 258.00 </capacity>
     <contents unit="LBS"> 100.00 </contents>
  </tank>

 </propulsion>


 <system file="gear"/>
 <system file="flaps"/>
 <system file="speedbrakes"/>
 <system file="NWS"/>
 <system file="alpha_buffet"/>
 <system file="canopy"/>
 <system file="particles"/>
 <system file="armament"/>
 <system file="over-g"/>
 <system file="beacon"/>
 <system file="swiftR5-autopilot"/>
 <system file="swift-r5-electrical"/>


 <flight_control name="FCS: swift_r5">

        <channel name="Pitch">

            <summer name="Pilot Pitch Sum">
                <input>fcs/elevator-cmd-norm</input>
                <input>fcs/pitch-trim-cmd-norm</input>
                <clipto>
                    <min>-1</min>
                    <max> 1</max>
                </clipto>
            </summer>

            <scheduled_gain name="Pitch Feel">
                <input>fcs/pilot-pitch-sum</input>
                <table>
                  <independentVar>velocities/mach</independentVar>
                    <tableData>
                        0.0000	1.0000
                        0.6000	0.7000
                        1.2000	0.5000
                    </tableData>
                </table>
            </scheduled_gain>

            <aerosurface_scale name="Elevator Final">
                <input>fcs/pitch-feel</input>
                <range>
                    <min>-0.30</min>
                    <max> 0.30</max>
                </range>
                <output>fcs/elevator-pos-rad</output>
            </aerosurface_scale>

            <aerosurface_scale name="elevator normalized">
                <input>fcs/elevator-pos-rad</input>
                <domain>
                    <min>-0.30</min>
                    <max> 0.30</max>
                </domain>
                <range>
                    <min>-1</min>
                    <max> 1</max>
                </range>
                <output>fcs/elevator-pos-norm</output>
            </aerosurface_scale>

        </channel>
        <channel name="Roll">
            <summer name="Pilot Roll Sum">
                <input>fcs/aileron-cmd-norm</input>
                <input>fcs/roll-trim-cmd-norm</input>
                <clipto>
                    <min>-1</min>
                    <max>1</max>
                </clipto>
            </summer>

            <scheduled_gain name="Roll Feel">
                <input>fcs/pilot-roll-sum</input>
                <table>
                  <independentVar>velocities/mach</independentVar>
                    <tableData>
                        0.0000	1.0000
                        0.6000	0.7500
                        1.2000	0.5000
                    </tableData>
                </table>
            </scheduled_gain>

            <aerosurface_scale name="Left Aileron Final">
                <input>fcs/roll-feel</input>
                <range>
                    <min>-0.35</min>
                    <max> 0.35</max>
                </range>
                <output>fcs/left-aileron-pos-rad</output>
            </aerosurface_scale>

            <aerosurface_scale name="Right Aileron Final">
                <input>-fcs/roll-feel</input>
                <range>
                    <min>-0.35</min>
                    <max> 0.35</max>
                </range>
                <output>fcs/right-aileron-pos-rad</output>
            </aerosurface_scale>

            <aerosurface_scale name="left aileron normalized">
                <input>fcs/left-aileron-pos-rad</input>
                <domain>
                    <min>-0.35</min>
                    <max> 0.35</max>
                </domain>
                <range>
                    <min>-1</min>
                    <max> 1</max>
                </range>
                <output>fcs/left-aileron-pos-norm</output>
            </aerosurface_scale>

            <aerosurface_scale name="right aileron normalized">
                <input>fcs/right-aileron-pos-rad</input>
                <domain>
                    <min>-0.35</min>
                    <max> 0.35</max>
                </domain>
                <range>
                    <min>-1</min>
                    <max> 1</max>
                </range>
                <output>fcs/right-aileron-pos-norm</output>
            </aerosurface_scale>

        </channel>

        <channel name="Yaw">

            <summer name="Rudder Command Sum">
                <input>fcs/rudder-cmd-norm</input>
                <input>fcs/yaw-trim-cmd-norm</input>
                <clipto>
                    <min>-1</min>
                    <max>1</max>
                </clipto>
            </summer>

            <scheduled_gain name="Yaw Damper Rate">
                <input>velocities/r-aero-rad_sec</input>
                <table>
                  <independentVar>velocities/mach</independentVar>
                    <tableData>
                        0.0000	0.0000
                        0.1000	0.0000
                        0.1100	1.0000
                    </tableData>
                </table>
            </scheduled_gain>

            <summer name="Rudder Sum">
                <input>fcs/rudder-command-sum</input>
                <input>fcs/yaw-damper-rate</input>
                <clipto>
                    <min>-1</min>
                    <max>1</max>
                </clipto>
            </summer>

            <aerosurface_scale name="Rudder Control">
                <input>fcs/rudder-sum</input>
                <range>
                    <min>-0.35</min>
                    <max> 0.35</max>
                </range>
                <output>fcs/rudder-pos-rad</output>
            </aerosurface_scale>

            <aerosurface_scale name="rudder normalized">
                <input>fcs/rudder-pos-rad</input>
                <domain>
                    <min>-0.35</min>
                    <max> 0.35</max>
                </domain>
                <range>
                    <min>-1</min>
                    <max> 1</max>
                </range>
                <output>fcs/rudder-pos-norm</output>
            </aerosurface_scale>

        </channel>

    </flight_control>

 <aerodynamics>

         <function name="aero/function/kCDge">
            <description>Change_in_drag_due_to_ground_effect</description>
            <product>
                  <table>
                      <independentVar>aero/h_b-mac-ft</independentVar>
                      <tableData>
                          0.0000	0.4200
                          0.1000	0.4750
                          0.1500	0.5490
                          0.2000	0.6090
                          0.3000	0.7750
                          0.4000	0.8820
                          0.5000	0.9280
                          0.6000	0.9620
                          0.7000	0.9880
                          0.9000	1.0000
                      </tableData>
                  </table>
            </product>
        </function>

        <function name="aero/function/kCLge">
            <description>Change_in_lift_due_to_ground_effect</description>
            <product>
                  <table>
                      <independentVar>aero/h_b-mac-ft</independentVar>
                      <tableData>
                          0.0000	1.230
                          0.1000	1.170
                          0.1500	1.100
                          0.2000	1.0830
                          0.3000	1.0560
                          0.4000	1.0550
                          0.5000	1.0290
                          0.6000	1.0190
                          0.7000	1.0080
                          0.8000	1.0060
                          0.9000	1.0030
                          1.0000	1.0020
                          1.1000	1.0000
                      </tableData>
                  </table>
            </product>
        </function>

<alphalimits unit="DEG">
   <min>-8.0</min>
   <max>16.0</max>
  </alphalimits>

  <hysteresis_limits unit="DEG">
   <min> 15.0</min>
   <max>17.0</max>
  </hysteresis_limits>

  <axis name="LIFT">

   <function name="aero/coefficient/CLalpha">
            <description>Lift_due_to_alpha</description>
            <product>
            <property>aero/qbar-psf</property>
            <property>metrics/Sw-sqft</property>
            <table>
            <independentVar lookup="row">aero/alpha-rad</independentVar>
                     <tableData>
                             -0.2000   -0.782
                             -0.157    -0.576
                             -0.107    -0.398
                             -0.0523   -0.192
                             -0.0350   -0.100
                             -0.0175   -0.049
                              0.0000   0.09
                              0.0175   0.192
                              0.0350   0.28
                              0.0523   0.428
                              0.1047   0.795
                              0.1396   0.974
                              0.1745   1.199
                              0.226    1.30
                              0.2617   1.240
                              0.3300   0.8250
                              0.56    0.2740
                          </tableData>
                       </table>
                      </product>
                    </function>

    <function name="aero/force/Lift_flap">
       <description>Delta Lift due to flaps</description>
       <product>
           <property>aero/qbar-psf</property>
           <property>metrics/Sw-sqft</property>
           <property>fcs/flap-pos-deg</property>
           <value> 0.0167 </value>
       </product>
    </function>

    <function name="aero/force/Lift_elevator">
       <description>Lift due to Elevator Deflection</description>
       <product>
           <property>aero/qbar-psf</property>
           <property>metrics/Sw-sqft</property>
           <property>fcs/elevator-pos-rad</property>
           <value>0.12</value>
       </product>
    </function>

  </axis>

  <axis name="DRAG">

    <function name="aero/force/Drag_basic">
       <description>Drag at zero lift</description>
       <product>
          <property>aero/qbar-psf</property>
          <property>metrics/Sw-sqft</property>
          <table>
            <independentVar lookup="row">aero/alpha-rad</independentVar>
                          <tableData>
                             -0.330    0.227
                             -0.260    0.110
                             -0.2000   0.0782
                             -0.157    0.0436
                             -0.107    0.0338
                             -0.0523   0.0202
                             -0.0350   0.0147
                             -0.0175   0.0119
                              0.0000   0.0089
                              0.0175   0.0113
                              0.0350   0.0131
                              0.0523   0.0150
                              0.0872   0.0206
                              0.1221   0.0304
                              0.1745   0.0509
                              0.2600   0.0940
                              0.3300   0.1950
                              0.6000   0.2740
                          </tableData>
          </table>
       </product>
    </function>

    <function name="aero/force/Drag_induced">
       <description>Induced drag</description>
         <product>
           <property>aero/qbar-psf</property>
           <property>metrics/Sw-sqft</property>
           <property>aero/cl-squared</property>
           <value>0.043</value>
         </product>
    </function>

    <function name="aero/force/Drag_mach">
       <description>Drag due to mach</description>
        <product>
          <property>aero/qbar-psf</property>
          <property>metrics/Sw-sqft</property>
          <table>
            <independentVar lookup="row">velocities/mach</independentVar>
            <tableData>
                0.00      0.000
                0.75      0.000
                1.10      0.018
                1.80      0.012
            </tableData>
          </table>
        </product>
    </function>

    <function name="aero/force/Drag_flap">
       <description>Drag due to flaps</description>
         <product>
           <property>aero/qbar-psf</property>
           <property>metrics/Sw-sqft</property>
           <property>fcs/flap-pos-deg</property>
           <value> 0.0039 </value>
         </product>
    </function>

    <function name="aero/force/Drag_gear">
       <description>Drag due to gear</description>
         <product>
           <property>aero/qbar-psf</property>
           <property>metrics/Sw-sqft</property>
           <property>gear/gear-pos-norm</property>
           <value>0.021</value>
         </product>
    </function>

    <function name="aero/force/Drag_speedbrake">
       <description>Drag due to speedbrakes</description>
         <product>
           <property>aero/qbar-psf</property>
           <property>metrics/Sw-sqft</property>
           <property>fcs/speedbrake-pos-norm</property>
           <value>0.031</value>
         </product>
    </function>

    <function name="aero/force/Drag_beta">
       <description>Drag due to sideslip</description>
       <product>
          <property>aero/qbar-psf</property>
          <property>metrics/Sw-sqft</property>
          <table>
            <independentVar lookup="row">aero/beta-rad</independentVar>
            <tableData>
              -1.57    1.230
              -0.26    0.050
               0.00    0.000
               0.26    0.050
               1.57    1.230
            </tableData>
          </table>
       </product>
    </function>

    <function name="aero/force/Drag_elevator">
       <description>Drag due to Elevator Deflection</description>
       <product>
           <property>aero/qbar-psf</property>
           <property>metrics/Sw-sqft</property>
           <abs><property>fcs/elevator-pos-norm</property></abs>
           <value>0.031</value>
       </product>
    </function>

  </axis>

  <axis name="SIDE">

    <function name="aero/force/Side_beta">
       <description>Side force due to beta</description>
       <product>
           <property>aero/qbar-psf</property>
           <property>metrics/Sw-sqft</property>
           <property>aero/beta-rad</property>
           <value>-1.03</value>
       </product>
    </function>

  </axis>

  <axis name="ROLL">

    <function name="aero/moment/Roll_beta">
       <description>Roll moment due to beta</description>
       <product>
           <property>aero/qbar-psf</property>
           <property>metrics/Sw-sqft</property>
           <property>metrics/bw-ft</property>
           <property>aero/beta-rad</property>
           <value>-0.031</value>
       </product>
    </function>

    <function name="aero/moment/Roll_damp">
       <description>Roll moment due to roll rate</description>
       <product>
           <property>aero/qbar-psf</property>
           <property>metrics/Sw-sqft</property>
           <property>metrics/bw-ft</property>
           <property>aero/bi2vel</property>
           <property>velocities/p-aero-rad_sec</property>
           <value>-0.34</value>
       </product>
    </function>

    <function name="aero/moment/Roll_yaw">
       <description>Roll moment due to yaw rate</description>
       <product>
           <property>aero/qbar-psf</property>
           <property>metrics/Sw-sqft</property>
           <property>metrics/bw-ft</property>
           <property>aero/bi2vel</property>
           <property>velocities/r-aero-rad_sec</property>
           <value>0.0015</value>
       </product>
    </function>

    <function name="aero/moment/Roll_aileron">
       <description>Roll moment due to aileron</description>
       <product>
          <property>aero/qbar-psf</property>
          <property>metrics/Sw-sqft</property>
          <property>metrics/bw-ft</property>
          <property>fcs/left-aileron-pos-rad</property>
          <table>
            <independentVar lookup="row">velocities/mach</independentVar>
            <tableData>
              0.0    0.110
              2.0    0.037
            </tableData>
          </table>
       </product>
    </function>

    <function name="aero/moment/Roll_rudder">
       <description>Roll moment due to rudder</description>
       <product>
           <property>aero/qbar-psf</property>
           <property>metrics/Sw-sqft</property>
           <property>metrics/bw-ft</property>
           <property>fcs/rudder-pos-rad</property>
           <value>0.0051</value>
       </product>
    </function>

  </axis>

  <axis name="PITCH">

   <function name="aero/coefficient/Cmflap">
                <description>Pitch_moment_due_to_flaps</description>
                <product>
                    <property>aero/qbar-psf</property>
                    <property>metrics/Sw-sqft</property>
                    <property>metrics/cbarw-ft</property>
                    <property>fcs/flap-pos-norm</property>
                    <value>-0.013</value>
                </product>
            </function>

      <function name="aero/coefficient/Cmgear">
        <description>Pitch_moment_due_to_gear</description>
                <product>
                    <property>aero/qbar-psf</property>
                    <property>metrics/Sw-sqft</property>
                    <property>metrics/cbarw-ft</property>
                    <property>gear/gear-pos-norm</property>
                    <value>-0.009</value>
                </product>
            </function>

    <function name="aero/moment/Pitch_alpha">
       <description>Pitch moment due to alpha</description>
       <product>
           <property>aero/qbar-psf</property>
           <property>metrics/Sw-sqft</property>
           <property>metrics/cbarw-ft</property>
           <property>aero/alpha-rad</property>
           <value>-0.3</value>
       </product>
    </function>

    <function name="aero/moment/Pitch_elevator">
       <description>Pitch moment due to elevator</description>
       <product>
          <property>aero/qbar-psf</property>
          <property>metrics/Sw-sqft</property>
          <property>metrics/cbarw-ft</property>
          <property>fcs/elevator-pos-rad</property>
          <table>
            <independentVar lookup="row">velocities/mach</independentVar>
            <tableData>
              0.0     -0.800
              2.0     -0.200
            </tableData>
          </table>
       </product>
    </function>

    <function name="aero/moment/Pitch_damp">
       <description>Pitch moment due to pitch rate</description>
       <product>
           <property>aero/qbar-psf</property>
           <property>metrics/Sw-sqft</property>
           <property>metrics/cbarw-ft</property>
           <property>aero/ci2vel</property>
           <property>velocities/q-aero-rad_sec</property>
           <value>-29</value>
       </product>
    </function>

    <function name="aero/moment/Pitch_alphadot">
       <description>Pitch moment due to alpha rate</description>
       <product>
           <property>aero/qbar-psf</property>
           <property>metrics/Sw-sqft</property>
           <property>metrics/cbarw-ft</property>
           <property>aero/ci2vel</property>
           <property>aero/alphadot-rad_sec</property>
           <value>-9</value>
       </product>
    </function>

   <function name="aero/coefficient/CXa">
        <description>Pitch_force_due_to_alpha</description>
        <product>
          <property>aero/qbar-psf</property>
          <property>metrics/Sw-sqft</property>
          <property>aero/alpha-rad</property>
          <value>-0.89</value>
        </product>
    </function>

  </axis>

  <axis name="YAW">

    <function name="aero/moment/Yaw_beta">
       <description>Yaw moment due to beta</description>
       <product>
           <property>aero/qbar-psf</property>
           <property>metrics/Sw-sqft</property>
           <property>metrics/bw-ft</property>
           <property>aero/beta-rad</property>
           <value>0.102</value>
       </product>
    </function>

    <function name="aero/moment/Yaw_damp">
       <description>Yaw moment due to yaw rate</description>
       <product>
           <property>aero/qbar-psf</property>
           <property>metrics/Sw-sqft</property>
           <property>metrics/bw-ft</property>
           <property>aero/bi2vel</property>
           <property>velocities/r-aero-rad_sec</property>
           <value>-0.125</value>
       </product>
    </function>

    <function name="aero/moment/Yaw_rudder">
       <description>Yaw moment due to rudder</description>
       <product>
           <property>aero/qbar-psf</property>
           <property>metrics/Sw-sqft</property>
           <property>metrics/bw-ft</property>
           <property>fcs/rudder-pos-rad</property>
           <value>-0.081</value>
       </product>
    </function>

    <function name="aero/moment/Yaw_aileron">
       <description>Adverse yaw</description>
       <product>
           <property>aero/qbar-psf</property>
           <property>metrics/Sw-sqft</property>
           <property>metrics/bw-ft</property>
           <property>fcs/left-aileron-pos-rad</property>
           <value>0.004</value>
       </product>
    </function>

  </axis>

 </aerodynamics>

</fdm_config>
